<?xml version="1.0"?>
<?xml-stylesheet href="http://jsbsim.sourceforge.net/JSBSim.xsl" type="text/xsl"?>
<fdm_config name="747-200" version="2.0" release="PRODUCTION"
 xmlns:xsi="http://www.w3.org/2001/XMLSchema-instance"
 xsi:noNamespaceSchemaLocation="http://jsbsim.sourceforge.net/JSBSim.xsd">

    <fileheader>
        <author> </author>
        <filecreationdate> 11 August 2019 </filecreationdate>
        <version> 2.04 </version>
        <description> 747-200 with JT9D-7R4G2 </description>

        <license>
          <licenseName>GPL (General Public License)</licenseName>
          <licenseURL>http://www.gnu.org/licenses/gpl.html</licenseURL>
        </license>
        <note>
          This model was created using publicly available data, publicly available
          technical reports, textbooks, and guesses. It contains no proprietary or
          restricted data. It has been validated only to the extent that it seems
          to "fly right", and possibly to comply to published, publicly known,
          performance data (maximum speed, endurance, etc.). Thus, this model
          is meant for educational and entertainment purposes only.

          This simulation model is not endorsed by the manufacturer. This model
          is not to be sold.
        </note>

        <note>maximum takeoff weight 833,000 lb.</note>
        <note>extended range fuel 54,388 US gal (364,400 lb).</note>
        <note>center of gravity between 13.0 % and 33.0 % of MAC.</note>
        <note>spoilers, leading edge flaps.</note>
        <note>gear height adjusted by 3D model, supposed accurate.</note>
        <note>nose wheel steering is off.</note>
        <note>747 coefficients.</note>
        <note>pushback and wake.</note>

        <limitation>at landing the arm of CG must be weak, otherwise pitch control is too slow to react at touch-down.</limitation>

<!--
  File:     747-200.xml
  Author:   Aero-Matic v 0.71

  Inputs:
    name:          747-200
    type:          four-engine transonic transport
    max weight:    833000 lb
    wing span:     195.67 ft
    length:        231.85 ft
    wing area:     5500 sq-ft
    gear type:     tricycle
    retractable?:  yes
    # engines:     4
    engine type:   turbine
    engine layout: wings
    yaw damper?    yes
  Outputs:
    wing loading:  151.45 lb/sq-ft
    CL-alpha:      4.4 per radian
    CL-0:          0.2
    CL-max:        1.2
    CD-0:          0.017
    K:             0.042
-->

        <reference
          refID="FAA certificate, a20we"
          author="FAA"
          title="http://www.airweb.faa.gov/Regulatory_and_Guidance_Library/rgMakeModel.nsf/MainFrame?OpenFrameSet"
          date="23 December 1970, 747-200B"/>
        <documentation>
          MAC : 327.8 in.
          Datum :
          - balance arm datum corresponds to body station 0, at 90 in. forward of nose.
          - horizontal distance of datum to nose gear jack points in 384.7 in.
          Leading edge of MAC : 1258 in.

          MAC starts at 1168 in. from nose, and continues above the gears.
        </documentation>

        <reference
          refID="747 airplane characteristics, D6-58236"
          author="Boeing"
          title="http://www.boeing.com/"
          date="May 1984"/>
        <documentation>
          Dimensions : lateral position of engines.
                       gear tracks.
          Gear stearing.
          Tanks typical quantities.
        </documentation>

        <documentation>
          - http://www.aoe.vt.edu/~mason/Mason_f/M96SC02.pdf/ (Willian H. Mason) :

          CG range : 13.0 / 33.0 %  MAC.

          - http://www.bh.com/companions/034074152X/appendices/data-a/table-3/table.htm :

          Horizontal tail : area 136.60 m2, arm 32.50 m, 1/4 chord sweep 32.00 m.
          Vertical tail : area 77.10 m2, arm 30.00 m, 1/4 chord sweep 45.00 m.
          V2 177 kt, Vapp 141 kt, Vne/Mme 445 kt / 0.95 Mach.

          - http://www.airliners.net/discussions/tech_ops/read.main/52218/6/#ID52218 :

          V2 190 kt (max takeoff load), climbs without flaps only at V2 + 100 kt.
          VREF 154 kt (max landing load).
        </documentation>
        <reference
          refID="Nasa CR D-2144"
          author="Robert K. Heffley and Wayne F. Jewell"
          title="Aircraft handling qualities data"
          date="December 1972"/>
        <documentation>
          - http://ntrs.nasa.gov/ :

          747 coefficients :
          - mach 0.20 is the landing configuration (flaps 30).
          - mach 0.25 is the approach configuration (flaps 20).

          Estimation of drag and lift at zero lift :
          - CDo = CD - ( CDalpha x alpha + CDmach x mach + CDflaps + CDLE + CDgear ).
          - CLo = CL - ( CLalpha x alpha + CLmach x mach + CLflaps + CLLE + CLde x ds ).
          - table IX-3 provides alpha and mach.
          - stabilizer, drag and lift are guessed from drawings.
          - CDde, which is not included in CDo formula, adjusts range.
        </documentation>

    </fileheader>

    <metrics>
        <documentation>
          - aero reference point is at empty load CG (33 % MAC) :
            less arm for landing; control is supposed easier if CG is forwards.
          - VRP at nose.
          - gear estimated at 25 ft (300 in.) below nose.
          - wing incidence helps the takeoff.
        </documentation>
        <wingarea unit="FT2"> 5500 </wingarea>
        <wingspan unit="FT"> 195.67 </wingspan>
        <chord unit="FT"> 27.32 </chord>                                                  <!-- aeromatic 28.11 -->
        <htailarea unit="FT2"> 1470.35 </htailarea>                                       <!-- aeromatic 1375.00 -->
        <htailarm unit="FT"> 106.63 </htailarm>                                           <!-- aeromatic 104.33 -->
        <vtailarea unit="FT2"> 829.9 </vtailarea>                                         <!-- aeromatic 1100.00 -->
        <vtailarm unit="FT"> 0 </vtailarm>
        <!-- AC_LV        98.43     -->                        <!-- ft -->                <!-- aeromatic 104.33 -->
        <wing_incidence unit="DEG"> 2 </wing_incidence>
        <location name="AERORP" unit="IN">
            <x> 1276 </x>
            <y> 0 </y>
            <z> 0 </z>
        </location>
        <location name="EYEPOINT" unit="IN">
            <x> 218 </x>
            <y> -21 </y>
            <z> 80 </z>
        </location>
        <location name="VRP" unit="IN">
            <x> 0 </x>
            <y> 0 </y>
            <z> 0 </z>
        </location>
    </metrics>

    <mass_balance>
        <documentation>
          - operational empty weight = 376170 lb + 160 lb for extended fuel range.
          - empty CG at 23 % MAC (no payload).
          - the point mass is the equivalent payload to get 833000 lb; adjusted so that
            CG at empty fuel is 33 % MAC (1276 in.), full load 20 % (1232 in.).
        </documentation>
        <ixx unit="SLUG*FT2"> 3.80337e+07 </ixx>
        <iyy unit="SLUG*FT2"> 6.02827e+07 </iyy>
        <izz unit="SLUG*FT2"> 9.79195e+07 </izz>
        <ixy unit="SLUG*FT2"> 0 </ixy>
        <ixz unit="SLUG*FT2"> 0 </ixz>
        <iyz unit="SLUG*FT2"> 0 </iyz>
        <emptywt unit="LBS"> 376330 </emptywt>
        <location name="CG" unit="IN">
            <x> 1243.4 </x>
            <y> 0 </y>
            <z> -69.6 </z>
        </location>
        <pointmass name="payload">
            <weight unit="LBS"> 92270 </weight>
            <location name="payload" unit="IN">
                <x> 1415 </x>
                <y> 0 </y>
                <z> -69.6 </z>
            </location>
        </pointmass>
    </mass_balance>

    <ground_reactions>
        <documentation>
           - gear height determined by 3D model, supposed at scale.
           - additonal contact points for crash detection, when gear retracted.
        </documentation>
        <contact type="BOGEY" name="NOSE">
            <location unit="IN">
                <x> 305 </x>
                <y> 0 </y>
                <z> -225 </z>
            </location>
            <static_friction> 0.8 </static_friction>
            <dynamic_friction> 0.5 </dynamic_friction>
            <rolling_friction> 0.02 </rolling_friction>
            <spring_coeff unit="LBS/FT"> 249900 </spring_coeff>
            <damping_coeff unit="LBS/FT/SEC"> 83300 </damping_coeff>
            <max_steer unit="DEG"> 70 </max_steer>
            <brake_group> NONE </brake_group>
            <retractable>1</retractable>
        </contact>
        <contact type="BOGEY" name="LEFT_WING">
            <location unit="IN">
                <x> 1252.5 </x>
                <y> -216.5 </y>
                <z> -225 </z>
            </location>
            <static_friction> 0.8 </static_friction>
            <dynamic_friction> 0.5 </dynamic_friction>
            <rolling_friction> 0.02 </rolling_friction>
            <spring_coeff unit="LBS/FT"> 833000 </spring_coeff>
            <damping_coeff unit="LBS/FT/SEC"> 166600 </damping_coeff>
            <max_steer unit="DEG"> 0.0 </max_steer>
            <brake_group> LEFT </brake_group>
            <retractable>1</retractable>
        </contact>
        <contact type="BOGEY" name="LEFT_BODY">
            <location unit="IN">
                <x> 1373.5 </x>
                <y> -75.5 </y>
                <z> -225 </z>
            </location>
            <static_friction> 0.8 </static_friction>
            <dynamic_friction> 0.5 </dynamic_friction>
            <rolling_friction> 0.02 </rolling_friction>
            <spring_coeff unit="LBS/FT"> 833000 </spring_coeff>
            <damping_coeff unit="LBS/FT/SEC"> 166600 </damping_coeff>
            <max_steer unit="DEG"> 13 </max_steer>
            <brake_group> LEFT </brake_group>
            <retractable>1</retractable>
        </contact>
        <contact type="BOGEY" name="RIGHT_BODY">
            <location unit="IN">
                <x> 1373.5 </x>
                <y> 75.5 </y>
                <z> -225 </z>
            </location>
            <static_friction> 0.8 </static_friction>
            <dynamic_friction> 0.5 </dynamic_friction>
            <rolling_friction> 0.02 </rolling_friction>
            <spring_coeff unit="LBS/FT"> 833000 </spring_coeff>
            <damping_coeff unit="LBS/FT/SEC"> 166600 </damping_coeff>
            <max_steer unit="DEG"> 13 </max_steer>
            <brake_group> RIGHT </brake_group>
            <retractable>1</retractable>
        </contact>
        <contact type="BOGEY" name="RIGHT_WING">
            <location unit="IN">
                <x> 1252 </x>
                <y> 216.5 </y>
                <z> -225 </z>
            </location>
            <static_friction> 0.8 </static_friction>
            <dynamic_friction> 0.5 </dynamic_friction>
            <rolling_friction> 0.02 </rolling_friction>
            <spring_coeff unit="LBS/FT"> 833000 </spring_coeff>
            <damping_coeff unit="LBS/FT/SEC"> 166600 </damping_coeff>
            <max_steer unit="DEG"> 0.0 </max_steer>
            <brake_group> RIGHT </brake_group>
            <retractable>1</retractable>
        </contact>
        <contact type="STRUCTURE" name="NOSE_TIP">
            <location unit="FT">
                <x> 0 </x>
                <y> 0 </y>
                <z> 0 </z>
            </location>
            <static_friction> 0.8 </static_friction>
            <dynamic_friction> 0.5 </dynamic_friction>
            <rolling_friction> 0.02 </rolling_friction>
            <spring_coeff unit="LBS/FT"> 249900 </spring_coeff>
            <damping_coeff unit="LBS/FT/SEC"> 83300 </damping_coeff>
            <max_steer unit="DEG"> 0.0 </max_steer>
            <brake_group> NONE </brake_group>
            <retractable>0</retractable>
        </contact>
        <contact type="STRUCTURE" name="LEFT_TIP">
            <location unit="FT">
                <x> 153.0 </x>
                <y> -97.83 </y>
                <z> 0 </z>
            </location>
            <static_friction> 0.8 </static_friction>
            <dynamic_friction> 0.5 </dynamic_friction>
            <rolling_friction> 0.02 </rolling_friction>
            <spring_coeff unit="LBS/FT"> 833000 </spring_coeff>
            <damping_coeff unit="LBS/FT/SEC"> 166600 </damping_coeff>
            <max_steer unit="DEG"> 0.0 </max_steer>
            <brake_group> NONE </brake_group>
            <retractable>0</retractable>
        </contact>
        <contact type="STRUCTURE" name="RIGHT_TIP">
            <location unit="FT">
                <x> 153.0 </x>
                <y> 97.83 </y>
                <z> 0 </z>
            </location>
            <static_friction> 0.8 </static_friction>
            <dynamic_friction> 0.5 </dynamic_friction>
            <rolling_friction> 0.02 </rolling_friction>
            <spring_coeff unit="LBS/FT"> 833000 </spring_coeff>
            <damping_coeff unit="LBS/FT/SEC"> 166600 </damping_coeff>
            <max_steer unit="DEG"> 0.0 </max_steer>
            <brake_group> NONE </brake_group>
            <retractable>0</retractable>
        </contact>
        <contact type="STRUCTURE" name="TAIL_TIP">
            <location unit="FT">
                <x> 225.17 </x>
                <y> 0 </y>
                <z> 0 </z>
            </location>
            <static_friction> 0.8 </static_friction>
            <dynamic_friction> 0.5 </dynamic_friction>
            <rolling_friction> 0.02 </rolling_friction>
            <spring_coeff unit="LBS/FT"> 249900 </spring_coeff>
            <damping_coeff unit="LBS/FT/SEC"> 83300 </damping_coeff>
            <max_steer unit="DEG"> 0.0 </max_steer>
            <brake_group> NONE </brake_group>
            <retractable>0</retractable>
        </contact>
    </ground_reactions>
    <propulsion>
        <engine file="JT9D-7R4G2">
            <location unit="IN">
                <x> 1530.21 </x>
                <y> -838 </y>                                                                 <!-- aeromatic -391.34 -->
                <z> -40 </z>
            </location>
            <orient unit="DEG">
                <roll> 0.0 </roll>
                <pitch> 0 </pitch>
                <yaw> 0 </yaw>
            </orient>
            <feed>0</feed>
            <feed>1</feed>
            <feed>2</feed>
            <feed>5</feed>
            <thruster file="direct">
                <location unit="IN">
                    <x> 1530.21 </x>
                    <y> -838 </y>
                    <z> -40 </z>
                </location>
                <orient unit="DEG">
                    <roll> 0.0 </roll>
                    <pitch> 0.0 </pitch>
                    <yaw> 0.0 </yaw>
                </orient>
            </thruster>
        </engine>
        <engine file="JT9D-7R4G2">
            <location unit="IN">
                <x> 1530.21 </x>
                <y> -477 </y>                                                                 <!-- aeromatic -391.34 -->
                <z> -40 </z>
            </location>
            <orient unit="DEG">
                <roll> 0.0 </roll>
                <pitch> 0 </pitch>
                <yaw> 0 </yaw>
            </orient>
            <feed>0</feed>
            <feed>1</feed>
            <feed>2</feed>
            <feed>5</feed>
            <thruster file="direct">
                <location unit="IN">
                    <x> 1530.21 </x>
                    <y> -477 </y>
                    <z> -40 </z>
                </location>
                <orient unit="DEG">
                    <roll> 0.0 </roll>
                    <pitch> 0.0 </pitch>
                    <yaw> 0.0 </yaw>
                </orient>
            </thruster>
        </engine>
        <engine file="JT9D-7R4G2">
            <location unit="IN">
                <x> 1530.21 </x>
                <y> 477 </y>
                <z> -40 </z>
            </location>
            <orient unit="DEG">
                <roll> 0.0 </roll>
                <pitch> 0 </pitch>
                <yaw> 0 </yaw>
            </orient>
            <feed>0</feed>
            <feed>3</feed>
            <feed>4</feed>
            <feed>6</feed>
            <thruster file="direct">
                <location unit="IN">
                    <x> 1530.21 </x>
                    <y> 477 </y>
                    <z> -40 </z>
                </location>
                <orient unit="DEG">
                    <roll> 0.0 </roll>
                    <pitch> 0.0 </pitch>
                    <yaw> 0.0 </yaw>
                </orient>
            </thruster>
        </engine>
        <engine file="JT9D-7R4G2">
            <location unit="IN">
                <x> 1530.21 </x>
                <y> 838 </y>
                <z> -40 </z>
            </location>
            <orient unit="DEG">
                <roll> 0.0 </roll>
                <pitch> 0 </pitch>
                <yaw> 0 </yaw>
            </orient>
            <feed>0</feed>
            <feed>3</feed>
            <feed>4</feed>
            <feed>6</feed>
            <thruster file="direct">
                <location unit="IN">
                    <x> 1530.21 </x>
                    <y> 838 </y>
                    <z> -40 </z>
                </location>
                <orient unit="DEG">
                    <roll> 0.0 </roll>
                    <pitch> 0.0 </pitch>
                    <yaw> 0.0 </yaw>
                </orient>
            </thruster>
        </engine>
        <documentation>
          - tank arm and lateral position is a guess : must fit inside the wing,
            in front of gear well; and close of aero reference point to minimize the CG shift.
          - typical quantities (52340 US gal).
          - extended range fuel (2048 US gal), spread on the reserve tanks.
          - 1 US gal = 6.7 lb.
          - reference length is 229 ft 2 in (includes elevator).
          - reference width is 195 ft 8 in (wing span)
        </documentation>
        <tank type="FUEL">    <!-- Tank number 0 -->
            <documentation>
               - center wing : 17160 US gal, 39/100 length (wing);
               - as the tanks are emptying, CG shifts aft.
            </documentation>
            <location unit="IN">
                <x> 1075.5 </x>
                <y> 0 </y>
                <z> -69.555 </z>
            </location>
            <capacity unit="LBS"> 114972 </capacity>
            <contents unit="LBS"> 114972 </contents>
        </tank>
        <tank type="FUEL">    <!-- Tank number 1 -->
            <documentation>
               main 1 and 4 : 4490 US gal, 48/100 length, 21/84 width.
            </documentation>
            <location unit="IN">
                <x> 1320 </x>
                <y> -587 </y>
                <z> -69.555 </z>
            </location>
            <capacity unit="LBS"> 30083 </capacity>
            <contents unit="LBS"> 30083 </contents>
        </tank>
        <tank type="FUEL">    <!-- Tank number 2 -->
            <documentation>
               main 2 and 3 : 12570 US gal, 43/100 length, 10/84 width.
            </documentation>
            <location unit="IN">
                <x> 1182.5 </x>
                <y> -279.5 </y>
                <z> -69.555 </z>
            </location>
            <capacity unit="LBS"> 84219 </capacity>
            <contents unit="LBS"> 84219 </contents>
        </tank>
        <tank type="FUEL">    <!-- Tank number 3 -->
            <location unit="IN">
                <x> 1182.5 </x>
                <y> 279.5 </y>
                <z> -69.555 </z>
            </location>
            <capacity unit="LBS"> 84219 </capacity>
            <contents unit="LBS"> 84219 </contents>
        </tank>
        <tank type="FUEL">    <!-- Tank number 4 -->
            <location unit="IN">
                <x> 1320 </x>
                <y> 587 </y>
                <z> -69.555 </z>
            </location>
            <capacity unit="LBS"> 30083 </capacity>
            <contents unit="LBS"> 30083 </contents>
        </tank>
        <tank type="FUEL">    <!-- Tank number 5 -->
            <documentation>
               reserve 1 and 4 : 530 + 1024 US gal, 45/100 length, 16/84 width.
            </documentation>
            <location unit="IN">
                <x> 1237.5 </x>
                <y> -447.2 </y>
                <z> -69.555 </z>
            </location>
            <capacity unit="LBS"> 10412 </capacity>
            <contents unit="LBS"> 10412 </contents>
        </tank>
        <tank type="FUEL">    <!-- Tank number 6 -->
            <location unit="IN">
                <x> 1237.5 </x>
                <y> 447.2 </y>
                <z> -69.555 </z>
            </location>
            <capacity unit="LBS"> 10412 </capacity>
            <contents unit="LBS"> 10412 </contents>
        </tank>
    </propulsion>

    <system name="Nose Wheel Steering">
     <channel name="Nose Wheel Steering">
        <scheduled_gain name="systems/NWS/pedal-cmd">
         <documentation>
              default is rudder pedal (flight).
         </documentation>
         <input>fcs/rudder-cmd-norm</input>
         <table>
          <independentVar lookup="row">systems/NWS/engaged</independentVar>
           <tableData>
              0      1.0
              1      0.0
           </tableData>
         </table>
         <output>fcs/rudder-pedal-norm</output>
        </scheduled_gain>

        <scheduled_gain name="systems/NWS/steer-cmd">
         <documentation>
              default is no wheel steering (flight).
         </documentation>
         <input>fcs/rudder-cmd-norm</input>
         <table>
          <independentVar lookup="row">systems/NWS/engaged</independentVar>
           <tableData>
              0      0.0
              1     -1.0
           </tableData>
         </table>
         <output>fcs/steer-cmd-norm</output>
      </scheduled_gain>
     </channel>
    </system>

    <system name="Tractor">
     <channel name="Tractor">

      <switch name="systems/pushback/linked">
        <default value="-1"/>
        <test value="0">
          /sim/model/pushback/position-norm gt 0.95
          /gear/gear/wow == 1
          gear/unit[0]/wheel-speed-fps lt 50
        </test>
      </switch>

      <summer name="systems/pushback/speed-error">
        <input>/sim/model/pushback/target-speed-fps</input>
        <input>-gear/unit[0]/wheel-speed-fps</input>
      </summer>

      <pid name="systems/pushback/force">
        <input>systems/pushback/speed-error</input>
        <kp>/sim/model/pushback/kp</kp>
        <ki>/sim/model/pushback/ki</ki>
        <kd>/sim/model/pushback/kd</kd>
        <trigger>systems/pushback/linked</trigger>
        <output>/sim/model/pushback/force</output>
      </pid>

      <switch name="systems/pushback/force-output">
        <default value="0"/>
        <test value="systems/pushback/force">
          systems/pushback/linked == 0
        </test>
        <output>external_reactions/tractor/magnitude</output>
      </switch>

    </channel>
   </system>

    <flight_control name="747-200">
     <property>fcs/LE-flap-cmd-norm</property>
     <property value="0">fcs/aeromatic</property>

     <channel name="Pitch">

        <summer name="Pitch Trim Sum">
            <input>fcs/elevator-cmd-norm</input>
            <input>fcs/pitch-trim-cmd-norm</input>
            <clipto>
                <min>-1</min>
                <max>1</max>
            </clipto>
        </summer>

        <aerosurface_scale name="Elevator Control">
            <input>fcs/pitch-trim-sum</input>
            <range>
                <min>-0.35</min>
                <max>0.3</max>
            </range>
            <output>fcs/elevator-pos-rad</output>
        </aerosurface_scale>
        <aerosurface_scale name="Elevator Position Normalizer">
            <input>fcs/pitch-trim-sum</input>
            <range>
                <min>-1</min>
                <max>1</max>
            </range>
            <output>fcs/elevator-pos-norm</output>
        </aerosurface_scale>

     </channel>
     <channel name="Roll">

        <summer name="Roll Trim Sum">
            <input>fcs/aileron-cmd-norm</input>
            <input>fcs/roll-trim-cmd-norm</input>
            <clipto>
                <min>-1</min>
                <max>1</max>
            </clipto>
        </summer>

        <aerosurface_scale name="Left Aileron Control">
            <input>fcs/roll-trim-sum</input>
            <range>
                <min>-0.35</min>
                <max>0.35</max>
            </range>
            <output>fcs/left-aileron-pos-rad</output>
        </aerosurface_scale>
        <aerosurface_scale name="Left Aileron Position Normalizer">
            <input>fcs/roll-trim-sum</input>
            <range>
                <min>-1</min>
                <max>1</max>
            </range>
            <output>fcs/left-aileron-pos-norm</output>
        </aerosurface_scale>

        <aerosurface_scale name="Right Aileron Control">
            <input>-fcs/roll-trim-sum</input>
            <range>
                <min>-0.35</min>
                <max>0.35</max>
            </range>
            <output>fcs/right-aileron-pos-rad</output>
        </aerosurface_scale>
        <aerosurface_scale name="Right Aileron Position Normalizer">
            <input>fcs/roll-trim-sum</input>
            <range>
                <min>-1</min>
                <max>1</max>
            </range>
            <output>fcs/right-aileron-pos-norm</output>
        </aerosurface_scale>

        <summer name="Differential inboard aileron rad">
            <documentation>
              added for CR D-2144.
            </documentation>
            <input>fcs/left-aileron-pos-rad</input>
            <input>-fcs/right-aileron-pos-rad</input>
            <clipto>
                <min>-1</min>
                <max>1</max>
            </clipto>
        </summer>

     </channel>
     <channel name="Yaw">

        <summer name="Rudder Command Sum">
            <input>fcs/rudder-pedal-norm</input>
            <input>fcs/yaw-trim-cmd-norm</input>
            <clipto>
                <min>-1</min>
                <max>1</max>
            </clipto>
        </summer>

        <scheduled_gain name="Yaw Damper Rate">
            <input>velocities/r-aero-rad_sec</input>
            <table>
                <independentVar>aero/qbar-psf</independentVar>
                <tableData>
                    3.0000	0.0000
                    11.0000	2.0000
                </tableData>
            </table>
        </scheduled_gain>

        <scheduled_gain name="Yaw Damper Beta">
            <input>aero/beta-rad</input>
            <table>
                <independentVar>aero/qbar-psf</independentVar>
                <tableData>
                    3.0000	0.0000
                    11.0000	0.0000
                </tableData>
            </table>
        </scheduled_gain>

        <summer name="Yaw Damper Sum">
            <input>fcs/yaw-damper-beta</input>
            <input>fcs/yaw-damper-rate</input>
            <clipto>
                <min>-0.2000</min>
                <max>0.2000</max>
            </clipto>
        </summer>

        <scheduled_gain name="Yaw Damper Final">
            <input>fcs/yaw-damper-sum</input>
            <table>
                <independentVar>aero/qbar-psf</independentVar>
                <tableData>
                    2.9900	0.0000
                    3.0000	1.0000
                </tableData>
            </table>
        </scheduled_gain>

        <summer name="Rudder Sum">
            <input>fcs/rudder-command-sum</input>
            <input>fcs/yaw-damper-final</input>
            <clipto>
                <min>-1.0000</min>
                <max>1.0000</max>
            </clipto>
        </summer>

        <aerosurface_scale name="Rudder Control">
            <input>fcs/rudder-sum</input>
            <range>
                <min>-0.3500</min>
                <max>0.3500</max>
            </range>
            <output>fcs/rudder-pos-rad</output>
        </aerosurface_scale>
        <aerosurface_scale name="Rudder Position Normalizer">
            <input>fcs/rudder-sum</input>
            <range>
                <min>-1</min>
                <max>1</max>
            </range>
            <output>fcs/rudder-pos-norm</output>
        </aerosurface_scale>

     </channel>
     <channel name="Aeromechanical">

        <kinematic name="Flaps Control">
            <input>fcs/flap-cmd-norm</input>
            <traverse>
                <setting>
                    <position>0.0000</position>
                    <time>0.0000</time>
                </setting>
                <setting>
                    <position>5.0000</position>
                    <time>3.0000</time>
                </setting>
                <setting>
                    <position>10.0000</position>
                    <time>2.0000</time>
                </setting>
                <setting>
                    <position>20.0000</position>
                    <time>3.0000</time>
                </setting>
                <setting>
                    <position>25.0000</position>
                    <time>2.0000</time>
                </setting>
                <setting>
                    <position>30.0000</position>
                    <time>2.0000</time>
                </setting>
            </traverse>
            <output>fcs/flap-pos-deg</output>
        </kinematic>
        <aerosurface_scale name="Flap Position Normalizer">
          <input>fcs/flap-pos-deg</input>
          <domain>
            <min>0</min>
            <max>30</max>
          </domain>
          <range>
            <min>0</min>
            <max>1</max>
          </range>
          <output>fcs/flap-pos-norm</output>
        </aerosurface_scale>

        <kinematic name="Gear Control">
            <input>gear/gear-cmd-norm</input>
            <traverse>
                <setting>
                    <position>0.0000</position>
                    <time>0.0000</time>
                </setting>
                <setting>
                    <position>1.0000</position>
                    <time>12.0000</time>
                </setting>
            </traverse>
            <output>gear/gear-pos-norm</output>
        </kinematic>

        <kinematic name="Speedbrake Control">
            <input>fcs/speedbrake-cmd-norm</input>
            <traverse>
                <setting>
                    <position>0.0000</position>
                    <time>0.0000</time>
                </setting>
                <setting>
                    <position>1.0000</position>
                    <time>1.0000</time>
                </setting>
            </traverse>
            <output>fcs/speedbrake-pos-norm</output>
        </kinematic>

        <kinematic name="Spoiler Control">
            <documentation>
               added : 35 deg.
            </documentation>
            <input>fcs/spoiler-cmd-norm</input>
            <traverse>
                <setting>
                    <position>0.0000</position>
                    <time>0.0000</time>
                </setting>
                <setting>
                    <position>0.6110</position>
                    <time>5.0000</time>
                </setting>
            </traverse>
            <output>fcs/spoiler-pos-rad</output>
        </kinematic>
        <aerosurface_scale name="Spoiler Position Normalizer">
            <documentation>
               added.
            </documentation>
            <input>fcs/spoiler-pos-rad</input>
            <domain>
              <min>0</min>
              <max>0.6110</max>
            </domain>
            <range>
                <min>0</min>
                <max>1</max>
            </range>
            <output>fcs/spoiler-pos-norm</output>
        </aerosurface_scale>

        <kinematic name="Leading Edge Flaps Control">
            <input>fcs/LE-flap-cmd-norm</input>
            <traverse>
                <setting>
                    <position>0.0000</position>
                    <time>0.0000</time>
                </setting>
                <setting>
                    <position>0.6670</position>
                    <time>7.0000</time>
                </setting>
                <setting>
                    <position>1.0000</position>
                    <time>3.0000</time>
                </setting>
            </traverse>
            <output>fcs/LE-flap-pos-norm</output>
        </kinematic>

     </channel>
     <channel name="Gear">

       <deadband name="Turn Body Gear Left">
           <input>fcs/steer-pos-deg[0]</input>
           <width>40</width>
           <gain>0.26</gain>
          <output>fcs/steer-pos-deg[2]</output>
        </deadband>

       <deadband name="Turn Body Gear Right">
           <input>fcs/steer-pos-deg[0]</input>
           <width>40</width>
           <gain>0.26</gain>
          <output>fcs/steer-pos-deg[3]</output>
        </deadband>
     </channel>
    </flight_control>
    <aerodynamics>
        <documentation>
             created :
             - help takeoff.
             - smooth landing.
        </documentation>
        <function name="aero/function/kCLge">
            <description>Change_in_lift_due_to_ground_effect</description>
                  <table>
                      <independentVar>aero/h_b-mac-ft</independentVar>
                      <tableData>
                          0.0000	1.2000
                          0.1000	1.1500
                          0.1500	1.0900
                          0.2000	1.0200
                          1.1000	1.0000
                      </tableData>
                  </table>
        </function>

        <axis name="DRAG">
            <documentation>
               - replaced by CR D-2144 + CDAlpha : see formula above.
            </documentation>
            <function name="aero/coefficient/CD0">
                <description>Drag_at_zero_lift</description>
                <product>
                    <property>aero/qbar-psf</property>
                    <property>metrics/Sw-sqft</property>
                      <table>
                          <independentVar lookup="row">velocities/mach</independentVar>
                          <independentVar lookup="column">fcs/aeromatic</independentVar>
                          <independentVar lookup="table">atmosphere/density-altitude</independentVar>
                          <tableData breakPoint="0">
                                      0         1
                              0.20    0.0294    0.0170
                              0.25   -0.0020    0.0170
                              0.45    0.0075    0.0170
                              0.65    0.0170    0.0170
                          </tableData>
                          <tableData breakPoint="20000">
                                      0         1
                              0.50    0.0035    0.0170
                              0.65    0.0143    0.0170
                              0.80    0.0055    0.0170
                          </tableData>
                          <tableData breakPoint="40000">
                                      0         1
                              0.70   -0.0474    0.0170
                              0.80    0.0109    0.0170
                              0.90   -0.0030    0.0170
                          </tableData>
                      </table>
<!--
                      <table>
                          <independentVar>aero/alpha-rad</independentVar>
                          <tableData>
                             -1.5700	1.5000
                             -0.2600	0.0340
                              0.0000	0.0170
                              0.2600	0.0340
                              1.5700	1.5000
                          </tableData>
                      </table>
-->
                </product>
            </function>

            <documentation>
               - added from CR D-2144.
               - drag is always positiv.
            </documentation>
            <function name="aero/coefficient/CDalpha">
                <description>Drag_due_to_alpha</description>
                <product>
                    <property>aero/qbar-psf</property>
                    <property>metrics/Sw-sqft</property>
                    <abs>
                      <property>aero/alpha-rad</property>
                    </abs>
                      <table>
                          <independentVar lookup="row">velocities/mach</independentVar>
                          <independentVar lookup="column">fcs/aeromatic</independentVar>
                          <independentVar lookup="table">atmosphere/density-altitude</independentVar>
                          <tableData breakPoint="0">
                                      0         1
                              0.20    1.1300    0.5000
                              0.25    0.6600    0.5000
                              0.30    0.6000    0.5000
                              0.45    0.2000    0.5000
                              0.65    0.0400    0.5000
                              0.70    0.0000    0.5000
                          </tableData>
                          <tableData breakPoint="20000">
                                      0         1
                              0.40    1.2000    0.5000
                              0.50    0.3500    0.5000
                              0.65    0.2000    0.5000
                              0.80    0.1000    0.5000
                          </tableData>
                          <tableData breakPoint="40000">
                                      0         1
                              0.70    1.0000    0.5000
                              0.75    0.5000    0.5000
                              0.80    0.4000    0.5000
                              0.90    0.5500    0.5000
                              0.98    0.5000    0.5000
                          </tableData>
                      </table>
                </product>
            </function>

            <documentation>
               - supposed included in CR D-2144 : 0.0420 -> 0.0000.
            </documentation>
            <function name="aero/coefficient/CDi">
                <description>Induced_drag</description>
                <product>
                    <property>aero/qbar-psf</property>
                    <property>metrics/Sw-sqft</property>
                    <property>aero/cl-squared</property>
                      <table>
                          <independentVar>fcs/aeromatic</independentVar>
                          <tableData>
                              0 	0.0000
                              1     	0.0420
                          </tableData>
                      </table>
                </product>
            </function>

            <documentation>
               - replaced by CR D-2144.
               - divide by 10, to cruise at Mach 0.84.
            </documentation>
            <function name="aero/coefficient/CDmach">
                <description>Drag_due_to_mach</description>
                <product>
                    <property>aero/qbar-psf</property>
                    <property>metrics/Sw-sqft</property>
                    <property>velocities/mach</property>
                    <value> 0.1 </value>
                      <table>
                          <independentVar lookup="row">velocities/mach</independentVar>
                          <independentVar lookup="column">fcs/aeromatic</independentVar>
                          <independentVar lookup="table">atmosphere/density-altitude</independentVar>
                          <tableData breakPoint="20000">
                                      0         1
                              0.75    0.0000    0.0000
                              0.80    0.0125    0.0070
                              0.85    0.0300    0.0400
                              0.90    0.1100    0.0800
                          </tableData>
                          <tableData breakPoint="40000">
                                      0         1
                              0.75    0.0000    0.0000
                              0.80    0.0250    0.0070
                              0.90    0.2500    0.0800
                          </tableData>
<!--
                          <independentVar>velocities/mach</independentVar>
                          <tableData>
                              0.0000	0.0000
                              0.7900	0.0000
                              1.1000	0.0230
                              1.8000	0.0150
                          </tableData>
-->
                      </table>
                </product>
            </function>

            <documentation>
              - drag always positive.
              - 0.0550 -> 0.0055 : divide by 10, to enable climb.
              - adjust range by increasing drag of CR D-2144.
            </documentation>
            <function name="aero/coefficient/CDde">
                <description>Drag_due_to_Elevator_Deflection</description>
                <product>
                    <property>aero/qbar-psf</property>
                    <property>metrics/Sw-sqft</property>
                    <abs>
                     <property>fcs/elevator-pos-norm</property>
                    </abs>
                    <value>0.0055</value>
                </product>
            </function>

            <documentation>
              - 0.055 -> 0.050.
              - 0.005 for LE flaps.
            </documentation>
            <function name="aero/coefficient/CDflap">
                <description>Drag_due_to_flaps</description>
                <product>
                    <property>aero/qbar-psf</property>
                    <property>metrics/Sw-sqft</property>
                    <property>fcs/flap-pos-norm</property>
                    <value>0.0500</value>
                </product>
            </function>

            <documentation>
              added.
            </documentation>
            <function name="aero/coefficient/CDLEflap">
                <description>Drag_due_to_leading_edge_flaps</description>
                <product>
                    <property>aero/qbar-psf</property>
                    <property>metrics/Sw-sqft</property>
                    <property>fcs/LE-flap-pos-norm</property>
                    <value>0.0050</value>
                </product>
            </function>

            <function name="aero/coefficient/CDgear">
                <description>Drag_due_to_gear</description>
                <product>
                    <property>aero/qbar-psf</property>
                    <property>metrics/Sw-sqft</property>
                    <property>gear/gear-pos-norm</property>
                    <value>0.0110</value>
                </product>
            </function>

            <documentation>
              no speedbrake : 0.0170 -> 0.0.
            </documentation>
            <function name="aero/coefficient/CDsb">
                <description>Drag_due_to_speedbrakes</description>
                <product>
                    <property>aero/qbar-psf</property>
                    <property>metrics/Sw-sqft</property>
                    <property>fcs/speedbrake-pos-norm</property>
                    <value>0.0</value>
                </product>
            </function>

            <function name="aero/coefficient/CDbeta">
                <description>Drag_due_to_sideslip</description>
                <product>
                    <property>aero/qbar-psf</property>
                    <property>metrics/Sw-sqft</property>
                      <table>
                          <independentVar>aero/beta-rad</independentVar>
                          <tableData>
                             -1.5700	1.2300
                             -0.2600	0.0500
                              0.0000	0.0000
                              0.2600	0.0500
                              1.5700	1.2300
                          </tableData>
                      </table>
                </product>
            </function>
        </axis>

        <axis name="SIDE">
            <documentation>
               - 1.0000 (beta-rad) replaced by CR D-2144.
            </documentation>
            <function name="aero/coefficient/CYb">
                <description>Side_force_due_to_beta</description>
                <product>
                    <property>aero/qbar-psf</property>
                    <property>metrics/Sw-sqft</property>
                    <property>aero/beta-rad</property>
                      <table>
                          <independentVar lookup="row">velocities/mach</independentVar>
                          <independentVar lookup="column">fcs/aeromatic</independentVar>
                          <independentVar lookup="table">atmosphere/density-altitude</independentVar>
                          <tableData breakPoint="0">
                                      0         1
                              0.20   -1.0800   -1.0000
                              0.25   -0.9600   -1.0000
                              0.30   -0.8250   -1.0000
                              0.45   -0.8500   -1.0000
                              0.65   -0.8000   -1.0000
                          </tableData>
                          <tableData breakPoint="20000">
                                      0         1
                              0.50   -0.9000   -1.0000
                              0.65   -0.8750   -1.0000
                              0.80   -0.8000   -1.0000
                              0.95   -0.8250   -1.0000
                          </tableData>
                          <tableData breakPoint="40000">
                                      0         1
                              0.70   -0.8750   -1.0000
                              0.80   -0.8625   -1.0000
                              0.90   -0.8250   -1.0000
                              0.95   -0.8125   -1.0000
                          </tableData>
                      </table>
                </product>
            </function>

            <documentation>
               - added from CR D-2144.
            </documentation>
            <function name="aero/coefficient/CYdr">
                <description>Side_force_due_to_rudder</description>
                <product>
                    <property>aero/qbar-psf</property>
                    <property>metrics/Sw-sqft</property>
                    <property>fcs/rudder-pos-rad</property>
                      <table>
                          <independentVar lookup="row">velocities/mach</independentVar>
                          <independentVar lookup="column">fcs/aeromatic</independentVar>
                          <independentVar lookup="table">atmosphere/density-altitude</independentVar>
                          <tableData breakPoint="0">
                                      0         1
                              0.20    0.1790    0.0000
                              0.25    0.1750    0.0000
                              0.30    0.1600    0.0000
                              0.45    0.1400    0.0000
                              0.65    0.0800    0.0000
                              0.70    0.0750    0.0000
                          </tableData>
                          <tableData breakPoint="20000">
                                      0         1
                              0.45    0.1500    0.0000
                              0.50    0.1450    0.0000
                              0.65    0.1300    0.0000
                              0.80    0.0750    0.0000
                          </tableData>
                          <tableData breakPoint="40000">
                                      0         1
                              0.65    0.1500    0.0000
                              0.70    0.1450    0.0000
                              0.80    0.1250    0.0000
                              0.90    0.0600    0.0000
                              0.95    0.0300    0.0000
                          </tableData>
                      </table>
                </product>
            </function>
        </axis>

        <axis name="LIFT">
            <documentation>
              - add Mach 0.2 to aeromatic : without flaps, 290 kt to climb at full load.
              - replaced by CR D-2144 : see formula above.
            </documentation>
            <function name="aero/coefficient/CLo">
                <description>Lift_at_zero_alpha</description>
                <product>
                    <property>aero/qbar-psf</property>
                    <property>metrics/Sw-sqft</property>
                    <property>aero/function/kCLge</property>
<!--
                      <table>
                          <independentVar>velocities/mach</independentVar>
                          <tableData>
                              0.2000   0.0000
                              0.6000   0.2000
                          </tableData>
                      </table>
-->
                      <table>
                          <independentVar lookup="row">velocities/mach</independentVar>
                          <independentVar lookup="column">fcs/aeromatic</independentVar>
                          <independentVar lookup="table">atmosphere/density-altitude</independentVar>
                          <tableData breakPoint="0">
                                      0         1
                              0.20    0.1938    0.2000
                              0.25    0.1014    0.2000
                              0.45    0.2024    0.2000
                              0.65    0.0212    0.2000
                          </tableData>
                          <tableData breakPoint="20000">
                                      0         1
                              0.50    0.2453    0.2000
                              0.65    0.1208    0.2000
                              0.80    0.1676    0.2000
                          </tableData>
                          <tableData breakPoint="40000">
                                      0         1
                              0.70    0.0880    0.2000
                              0.80    0.1546    0.2000
                              0.90    0.4771    0.2000
                          </tableData>
                      </table>
                </product>
            </function>

            <documentation>
              - replaced by CR D-2144.
            </documentation>
            <function name="aero/coefficient/CLalpha">
                <description>Lift_due_to_alpha</description>
                <product>
                    <property>aero/qbar-psf</property>
                    <property>metrics/Sw-sqft</property>
                    <property>aero/function/kCLge</property>
                    <property>aero/alpha-rad</property>
                      <table>
                          <independentVar lookup="row">velocities/mach</independentVar>
                          <independentVar lookup="column">fcs/aeromatic</independentVar>
                          <independentVar lookup="table">atmosphere/density-altitude</independentVar>
                          <tableData breakPoint="0">
                                      0         1
                              0.20    5.6700    5.0000
                              0.25    5.7000    5.0000
                              0.30    4.6000    5.0000
                              0.45    4.4000    5.0000
                              0.65    3.9000    5.0000
                              0.80    3.6000    5.0000
                          </tableData>
                          <tableData breakPoint="20000">
                                      0         1
                              0.50    4.7000    5.0000
                              0.65    4.5000    5.0000
                              0.80    4.2000    5.0000
                              0.90    4.8000    5.0000
                              0.95    3.0000    5.0000
                          </tableData>
                          <tableData breakPoint="40000">
                                      0         1
                              0.70    5.0000    5.0000
                              0.80    4.8000    5.0000
                              0.90    5.5000    5.0000
                              0.95    3.6000    5.0000
                          </tableData>
                      </table>
<!--
                      <table>
                          <independentVar lookup="row">aero/alpha-rad</independentVar>
                          <independentVar lookup="column">velocities/mach</independentVar>
                          <tableData>
                                       0.2000   0.6000
                             -0.200   -0.3400  -0.6800
                              0.0000   0.0000   0.2000
                              0.2300   0.6000   1.2000
                              0.6000   0.3000   0.6000
                          </tableData>
                      </table>
-->
                </product>
            </function>

            <documentation>
               - added from CR D-2144.
            </documentation>
            <function name="aero/coefficient/CLmach">
                <description>Lift_due_to_Mach</description>
                <product>
                    <property>aero/qbar-psf</property>
                    <property>metrics/Sw-sqft</property>
                    <property>velocities/mach</property>
                      <table>
                          <independentVar lookup="row">velocities/mach</independentVar>
                          <independentVar lookup="column">fcs/aeromatic</independentVar>
                          <independentVar lookup="table">atmosphere/density-altitude</independentVar>
                          <tableData breakPoint="0">
                                      0         1
                              0.20   -1.1000    0.0000
                              0.25   -0.8100    0.0000
                              0.35   -0.2000    0.0000
                              0.45   -0.1000    0.0000
                              0.65    0.2500    0.0000
                          </tableData>
                          <tableData breakPoint="20000">
                                      0         1
                              0.50   -0.1000    0.0000
                              0.65    0.2000    0.0000
                              0.70    0.2550    0.0000
                              0.80    0.1550    0.0000
                              0.90    0.0000    0.0000
                              0.95   -0.3000    0.0000
                          </tableData>
                          <tableData breakPoint="40000">
                                      0         1
                              0.70    0.2500    0.0000
                              0.80    0.2000    0.0000
                              0.92   -0.2500    0.0000
                              0.95   -0.7500    0.0000
                          </tableData>
                      </table>
                </product>
            </function>

            <documentation>
               - 0.2000 (elevator-pos-rad) replaced by CR D-2144.
            </documentation>
            <function name="aero/coefficient/CLde">
                <description>Lift_due_to_Elevator_Deflection</description>
                <product>
                    <property>aero/qbar-psf</property>
                    <property>metrics/Sw-sqft</property>
                    <property>fcs/elevator-pos-rad</property>
                      <table>
                          <independentVar lookup="row">velocities/mach</independentVar>
                          <independentVar lookup="column">fcs/aeromatic</independentVar>
                          <independentVar lookup="table">atmosphere/density-altitude</independentVar>
                          <tableData breakPoint="0">
                                      0         1
                              0.20    0.3560    0.2000
                              0.25    0.3380    0.2000
                              0.30    0.3200    0.2000
                              0.45    0.2600    0.2000
                              0.65    0.1800    0.2000
                              0.75    0.1500    0.2000
                          </tableData>
                          <tableData breakPoint="20000">
                                      0         1
                              0.40    0.3700    0.2000
                              0.50    0.3500    0.2000
                              0.65    0.3300    0.2000
                              0.80    0.2750    0.2000
                              0.95    0.1500    0.2000
                          </tableData>
                          <tableData breakPoint="40000">
                                      0         1
                              0.70    0.4000    0.2000
                              0.80    0.3800    0.2000
                              0.90    0.3000    0.2000
                              0.95    0.2400    0.2000
                          </tableData>
                      </table>
                </product>
            </function>

            <documentation>
              - added.
              - leading edge flaps enables higher alpha (by wing shape);
                while trailing edge flaps enables lower speed (by more lift).
            </documentation>
            <function name="aero/coefficient/dCLLEflap">
                <description>Delta_Lift_due_to_leading_edge_flaps</description>
                <product>
                    <property>aero/qbar-psf</property>
                    <property>metrics/Sw-sqft</property>
                    <property>fcs/LE-flap-pos-norm</property>
                      <table>
                          <independentVar>aero/alpha-rad</independentVar>
                          <tableData>
                              0.0000   0.0000
                              0.2000   0.1000
                              0.3000   0.1500
                              0.6000   0.0000
                          </tableData>
                      </table>
                </product>
            </function>

            <documentation>
              aeromatic was 1.5 :
              - reduces landing flaps lift, to respect VREF 154 kt : obliged to reduce the lift at 30 deg.
              - keeps takeoff flaps lift, to respect V2 190 kt.
              - includes the flaps inside the ground effect, to get more lift.

              replaced by CR D-2144.
            </documentation>
            <function name="aero/coefficient/dCLflap">
                <description>Delta_Lift_due_to_flaps</description>
                <product>
                    <property>aero/qbar-psf</property>
                    <property>metrics/Sw-sqft</property>
                    <property>aero/function/kCLge</property>
                      <table>
                          <independentVar lookup="row">fcs/flap-pos-deg</independentVar>
                          <independentVar lookup="column">fcs/aeromatic</independentVar>
                          <tableData>
                                      0         1
                              0       0.0000    0.0000
                              20      0.6067    1.0000
                              30      0.9100    0.9100
                          </tableData>
                      </table>
                </product>
            </function>

            <documentation>
              no speedbrake : -0.08 -> 0.0.
            </documentation>
            <function name="aero/coefficient/dCLsb">
                <description>Delta_Lift_due_to_speedbrake</description>
                <product>
                    <property>aero/qbar-psf</property>
                    <property>metrics/Sw-sqft</property>
                    <property>fcs/speedbrake-pos-norm</property>
                    <value>0.0000</value>
                </product>
            </function>

            <documentation>
              added.
            </documentation>
            <function name="aero/coefficient/dCLsp">
                <description>Delta_Lift_due_to_spoilers</description>
                <product>
                    <property>aero/qbar-psf</property>
                    <property>metrics/Sw-sqft</property>
                    <property>fcs/spoiler-pos-norm</property>
                    <value>-1.0000</value>
                </product>
            </function>

            <documentation>
               - added from CR D-2144 : only data at sea level.
            </documentation>
            <function name="aero/coefficient/CLadot">
                <description>Lift_due_to_alpha_rate</description>
                <product>
                    <property>aero/qbar-psf</property>
                    <property>metrics/Sw-sqft</property>
                    <property>aero/function/kCLge</property>
                    <property>aero/alphadot-rad_sec</property>
                    <property>aero/ci2vel</property>
                      <table>
                          <independentVar lookup="row">velocities/mach</independentVar>
                          <independentVar lookup="column">fcs/aeromatic</independentVar>
                          <tableData>
                                      0         1
                              0.20   -6.7000    0.0000
                              0.25   -6.7000    0.0000
                          </tableData>
                      </table>
                </product>
            </function>

            <documentation>
               - added from CR D-2144 : only data at sea level.
            </documentation>
            <function name="aero/coefficient/CLq">
                <description>Lift_due_to_pitch_rate</description>
                <product>
                    <property>aero/qbar-psf</property>
                    <property>metrics/Sw-sqft</property>
                    <property>aero/function/kCLge</property>
                    <property>velocities/q-aero-rad_sec</property>
                    <property>aero/ci2vel</property>
                      <table>
                          <independentVar lookup="row">velocities/mach</independentVar>
                          <independentVar lookup="column">fcs/aeromatic</independentVar>
                          <tableData>
                                      0         1
                              0.20    5.6500    0.0000
                              0.25    5.4000    0.0000
                          </tableData>
                      </table>
                </product>
            </function>
        </axis>

        <axis name="ROLL">
            <documentation>
               - -0.1000 (beta-rad) replaced by CR D-2144.
            </documentation>
            <function name="aero/coefficient/Clb">
                <description>Roll_moment_due_to_beta</description>
                <product>
                    <property>aero/qbar-psf</property>
                    <property>metrics/Sw-sqft</property>
                    <property>metrics/bw-ft</property>
                    <property>aero/beta-rad</property>
                      <table>
                          <independentVar lookup="row">velocities/mach</independentVar>
                          <independentVar lookup="column">fcs/aeromatic</independentVar>
                          <independentVar lookup="table">atmosphere/density-altitude</independentVar>
                          <tableData breakPoint="0">
                                      0         1
                              0.20   -0.2810   -0.1000
                              0.25   -0.2210   -0.1000
                              0.45   -0.1800   -0.1000
                              0.65   -0.1500   -0.1000
                          </tableData>
                          <tableData breakPoint="20000">
                                      0         1
                              0.45   -0.1450   -0.1000
                              0.50   -0.1900   -0.1000
                              0.65   -0.1750   -0.1000
                              0.80   -0.1700   -0.1000
                              0.90   -0.1750   -0.1000
                              0.95   -0.0300   -0.1000
                          </tableData>
                          <tableData breakPoint="40000">
                                      0         1
                              0.70   -0.1700   -0.1000
                              0.80   -0.2800   -0.1000
                              0.90   -0.0900   -0.1000
                              0.95   -0.0300   -0.1000
                          </tableData>
                      </table>
                </product>
            </function>

            <documentation>
               - -0.4000 (p-aero-rad_sec) replaced by CR D-2144.
            </documentation>
            <function name="aero/coefficient/Clp">
                <description>Roll_moment_due_to_roll_rate</description>
                <product>
                    <property>aero/qbar-psf</property>
                    <property>metrics/Sw-sqft</property>
                    <property>metrics/bw-ft</property>
                    <property>aero/bi2vel</property>
                    <property>velocities/p-aero-rad_sec</property>
                      <table>
                          <independentVar lookup="row">velocities/mach</independentVar>
                          <independentVar lookup="column">fcs/aeromatic</independentVar>
                          <independentVar lookup="table">atmosphere/density-altitude</independentVar>
                          <tableData breakPoint="0">
                                      0         1
                              0.20   -0.5020   -0.4000
                              0.25   -0.4500   -0.4000
                              0.30   -0.3100   -0.4000
                              0.45   -0.3100   -0.4000
                              0.65   -0.2900   -0.4000
                              0.70   -0.2800   -0.4000
                          </tableData>
                          <tableData breakPoint="20000">
                                      0         1
                              0.40   -0.2600   -0.4000
                              0.50   -0.3200   -0.4000
                              0.65   -0.3300   -0.4000
                              0.80   -0.3200   -0.4000
                              0.90   -0.3000   -0.4000
                              0.95   -0.2700   -0.4000
                          </tableData>
                          <tableData breakPoint="40000">
                                      0         1
                              0.70   -0.3100   -0.4000
                              0.80   -0.3200   -0.4000
                              0.90   -0.3000   -0.4000
                              0.95   -0.2700   -0.4000
                          </tableData>
                      </table>
                </product>
            </function>

            <documentation>
               - 0.1500 (r-aero-rad_sec) replaced by CR D-2144.
            </documentation>
            <function name="aero/coefficient/Clr">
                <description>Roll_moment_due_to_yaw_rate</description>
                <product>
                    <property>aero/qbar-psf</property>
                    <property>metrics/Sw-sqft</property>
                    <property>metrics/bw-ft</property>
                    <property>aero/bi2vel</property>
                    <property>velocities/r-aero-rad_sec</property>
                      <table>
                          <independentVar lookup="row">velocities/mach</independentVar>
                          <independentVar lookup="column">fcs/aeromatic</independentVar>
                          <independentVar lookup="table">atmosphere/density-altitude</independentVar>
                          <tableData breakPoint="0">
                                      0         1
                              0.20    0.1950    0.1500
                              0.25    0.1010    0.1500
                              0.30    0.2300    0.1500
                              0.45    0.1200    0.1500
                              0.65    0.0500    0.1500
                              0.70    0.0400    0.1500
                          </tableData>
                          <tableData breakPoint="20000">
                                      0         1
                              0.40    0.2800    0.1500
                              0.50    0.2200    0.1500
                              0.65    0.1400    0.1500
                              0.80    0.1000    0.1500
                              0.90    0.0400    0.1500
                          </tableData>
                          <tableData breakPoint="40000">
                                      0         1
                              0.70    0.2800    0.1500
                              0.80    0.3000    0.1500
                              0.90    0.1900    0.1500
                          </tableData>
                      </table>
                </product>
            </function>

            <documentation>
               - 0.1000 (left-aileron-pos-rad) replaced by CR D-2144.
               - differential-inboard-aileron-rad multiplies by 2 left-aileron-pos-rad.
            </documentation>
            <function name="aero/coefficient/Clda">
                <description>Roll_moment_due_to_aileron</description>
                <product>
                    <property>aero/qbar-psf</property>
                    <property>metrics/Sw-sqft</property>
                    <property>metrics/bw-ft</property>
                    <property>fcs/differential-inboard-aileron-rad</property>
                      <table>
                          <independentVar lookup="row">velocities/mach</independentVar>
                          <independentVar lookup="column">fcs/aeromatic</independentVar>
                          <independentVar lookup="table">atmosphere/density-altitude</independentVar>
                          <tableData breakPoint="0">
                                      0         1
                              0.20    0.0530    0.0500
                              0.25    0.0461    0.0500
                              0.30    0.0130    0.0500
                              0.35    0.0135    0.0500
                              0.45    0.0130    0.0500
                              0.65    0.0100    0.0500
                              0.70    0.0090    0.0500
                          </tableData>
                          <tableData breakPoint="20000">
                                      0         1
                              0.40    0.0070    0.0500
                              0.50    0.0130    0.0500
                              0.65    0.0125    0.0500
                              0.80    0.0120    0.0500
                              0.90    0.0065    0.0500
                          </tableData>
                          <tableData breakPoint="40000">
                                      0         1
                              0.70    0.0125    0.0500
                              0.80    0.0135    0.0500
                              0.90    0.0140    0.0500
                              0.95    0.0100    0.0500
                          </tableData>
                      </table>
<!--
                      <table>
                          <independentVar>velocities/mach</independentVar>
                          <tableData>
                              0.0000	0.1000
                              2.0000	0.0330
                          </tableData>
                      </table>
-->
                </product>
            </function>

            <documentation>
               - 0.0100 (rudder-pos-rad) replaced by CR D-2144.
            </documentation>
            <function name="aero/coefficient/Cldr">
                <description>Roll_moment_due_to_rudder</description>
                <product>
                    <property>aero/qbar-psf</property>
                    <property>metrics/Sw-sqft</property>
                    <property>metrics/bw-ft</property>
                    <property>fcs/rudder-pos-rad</property>
                      <table>
                          <independentVar lookup="row">velocities/mach</independentVar>
                          <independentVar lookup="column">fcs/aeromatic</independentVar>
                          <independentVar lookup="table">atmosphere/density-altitude</independentVar>
                          <tableData breakPoint="0">
                                      0         1
                              0.20    0.0000    0.0100
                              0.25    0.0070    0.0100
                              0.30    0.0000    0.0100
                              0.45    0.0120    0.0100
                              0.65    0.0100    0.0100
                          </tableData>
                          <tableData breakPoint="20000">
                                      0         1
                              0.45    0.0000    0.0100
                              0.50    0.0050    0.0100
                              0.65    0.0100    0.0100
                              0.80    0.0100    0.0100
                              0.95    0.0000    0.0100
                          </tableData>
                          <tableData breakPoint="40000">
                                      0         1
                              0.65    0.0000    0.0100
                              0.70    0.0025    0.0100
                              0.80    0.0070    0.0100
                              0.90    0.0060    0.0100
                              0.95    0.0040    0.0100
                          </tableData>
                      </table>
                </product>
            </function>
        </axis>

        <axis name="PITCH">
            <documentation>
               - -0.7000 (alpha-rad) replaced by CR D-2144.
            </documentation>
            <function name="aero/coefficient/Cmalpha">
                <description>Pitch_moment_due_to_alpha</description>
                <product>
                    <property>aero/qbar-psf</property>
                    <property>metrics/Sw-sqft</property>
                    <property>metrics/cbarw-ft</property>
                    <property>aero/alpha-rad</property>
                      <table>
                          <independentVar lookup="row">velocities/mach</independentVar>
                          <independentVar lookup="column">fcs/aeromatic</independentVar>
                          <independentVar lookup="table">atmosphere/density-altitude</independentVar>
                          <tableData breakPoint="0">
                                      0         1
                              0.20   -1.4500   -0.7000
                              0.25   -1.2600   -0.7000
                              0.30   -1.2000   -0.7000
                              0.45   -0.9500   -0.7000
                              0.65   -0.6500   -0.7000
                          </tableData>
                          <tableData breakPoint="20000">
                                      0         1
                              0.30   -1.3500   -0.7000
                              0.50   -1.2000   -0.7000
                              0.65   -1.0000   -0.7000
                              0.80   -0.6000   -0.7000
                              0.90   -1.2500   -0.7000
                          </tableData>
                          <tableData breakPoint="40000">
                                      0         1
                              0.70   -1.2000   -0.7000
                              0.80   -1.0500   -0.7000
                              0.90   -1.6500   -0.7000
                          </tableData>
                      </table>
                </product>
            </function>

            <documentation>
               - -1.3000 (elevator-pos-rad) replaced by CR D-2144.
            </documentation>
            <function name="aero/coefficient/Cmde">
                <description>Pitch_moment_due_to_elevator</description>
                <product>
                    <property>aero/qbar-psf</property>
                    <property>metrics/Sw-sqft</property>
                    <property>metrics/cbarw-ft</property>
                    <property>fcs/elevator-pos-rad</property>
                      <table>
                          <independentVar lookup="row">velocities/mach</independentVar>
                          <independentVar lookup="column">fcs/aeromatic</independentVar>
                          <independentVar lookup="table">atmosphere/density-altitude</independentVar>
                          <tableData breakPoint="0">
                                      0         1
                              0.20   -1.4000   -1.2025
                              0.25   -1.3400   -1.1781
                              0.30   -1.2500   -1.1538
                              0.45   -1.0500   -1.0806
                              0.65   -0.7500   -0.9831
                              0.70   -0.7000   -0.9588
                          </tableData>
                          <tableData breakPoint="20000">
                                      0         1
                              0.40   -1.5000   -1.1050
                              0.50   -1.4000   -1.0563
                              0.65   -1.3500   -0.9831
                              0.80   -1.1000   -0.9100
                              0.95   -0.6000   -0.8369
                          </tableData>
                          <tableData breakPoint="40000">
                                      0         1
                              0.70   -1.6000   -0.9588
                              0.80   -1.4500   -0.9100
                              0.90   -1.2500   -0.8613
                              0.95   -1.0000   -0.8369
                          </tableData>
                      </table>
<!--
                      <table>
                          <independentVar>velocities/mach</independentVar>
                          <tableData>
                              0.0000	-1.3000
                              2.0000	-0.3250
                          </tableData>
                      </table>
-->
                </product>
            </function>

            <documentation>
               - -21.0000 (q-aero-rad_sec) replaced by CR D-2144.
            </documentation>
            <function name="aero/coefficient/Cmq">
                <description>Pitch_moment_due_to_pitch_rate</description>
                <product>
                    <property>aero/qbar-psf</property>
                    <property>metrics/Sw-sqft</property>
                    <property>metrics/cbarw-ft</property>
                    <property>aero/ci2vel</property>
                    <property>velocities/q-aero-rad_sec</property>
                      <table>
                          <independentVar lookup="row">velocities/mach</independentVar>
                          <independentVar lookup="column">fcs/aeromatic</independentVar>
                          <independentVar lookup="table">atmosphere/density-altitude</independentVar>
                          <tableData breakPoint="0">
                                      0          1
                              0.20   -21.4000   -21.0000
                              0.25   -20.8000   -21.0000
                              0.30   -20.0000   -21.0000
                              0.45   -19.0000   -21.0000
                              0.65   -17.0000   -21.0000
                              0.75   -16.5000   -21.0000
                          </tableData>
                          <tableData breakPoint="20000">
                                      0          1
                              0.50   -21.0000   -21.0000
                              0.65   -20.5000   -21.0000
                              0.80   -20.7500   -21.0000
                              0.85   -21.0000   -21.0000
                              0.95   -18.0000   -21.0000
                          </tableData>
                          <tableData breakPoint="40000">
                                      0          1
                              0.50   -23.0000   -21.0000
                              0.70   -23.2500   -21.0000
                              0.80   -24.0000   -21.0000
                              0.90   -26.0000   -21.0000
                              0.95   -22.0000   -21.0000
                          </tableData>
                      </table>
                </product>
            </function>

            <documentation>
               - -4.0000 (alphadot-rad_sec) replaced by CR D-2144.
            </documentation>
            <function name="aero/coefficient/Cmadot">
                <description>Pitch_moment_due_to_alpha_rate</description>
                <product>
                    <property>aero/qbar-psf</property>
                    <property>metrics/Sw-sqft</property>
                    <property>metrics/cbarw-ft</property>
                    <property>aero/ci2vel</property>
                    <property>aero/alphadot-rad_sec</property>
                      <table>
                          <independentVar lookup="row">velocities/mach</independentVar>
                          <independentVar lookup="column">fcs/aeromatic</independentVar>
                          <independentVar lookup="table">atmosphere/density-altitude</independentVar>
                          <tableData breakPoint="0">
                                      0         1
                              0.20   -3.3000   -4.0000
                              0.25   -3.2000   -4.0000
                              0.30   -3.5000   -4.0000
                              0.45   -3.0000   -4.0000
                              0.65   -3.0000   -4.0000
                              0.75   -3.5000   -4.0000
                          </tableData>
                          <tableData breakPoint="20000">
                                      0         1
                              0.50   -3.5000   -4.0000
                              0.65   -4.0000   -4.0000
                              0.80   -5.5000   -4.0000
                              0.90   -7.0000   -4.0000
                              0.95   -4.5000   -4.0000
                          </tableData>
                          <tableData breakPoint="40000">
                                      0         1
                              0.50   -4.0000   -4.0000
                              0.70   -5.5000   -4.0000
                              0.80   -7.0000   -4.0000
                              0.90   -9.0000   -4.0000
                              0.95   -6.0000   -4.0000
                          </tableData>
                      </table>
                </product>
            </function>

            <documentation>
               - added from CR D-2144.
            </documentation>
            <function name="aero/coefficient/Cmmach">
                <description>Pitch_moment_due_to_mach</description>
                <product>
                    <property>aero/qbar-psf</property>
                    <property>metrics/Sw-sqft</property>
                    <property>metrics/cbarw-ft</property>
                    <property>velocities/mach</property>
                      <table>
                          <independentVar lookup="row">velocities/mach</independentVar>
                          <independentVar lookup="column">fcs/aeromatic</independentVar>
                          <independentVar lookup="table">atmosphere/density-altitude</independentVar>
                          <tableData breakPoint="0">
                                      0         1
                              0.20    0.3600    0.0000
                              0.25    0.2700    0.0000
                              0.35    0.2200    0.0000
                              0.45    0.0400    0.0000
                              0.65   -0.0600    0.0000
                              0.70   -0.0500    0.0000
                          </tableData>
                          <tableData breakPoint="20000">
                                      0         1
                              0.40    0.2000    0.0000
                              0.50    0.1000    0.0000
                              0.65    0.0200    0.0000
                              0.80   -0.1000    0.0000
                              0.85   -0.3000    0.0000
                              0.95    0.1000    0.0000
                          </tableData>
                          <tableData breakPoint="40000">
                                      0         1
                              0.70    0.3000    0.0000
                              0.80    0.1750    0.0000
                              0.90   -0.1000    0.0000
                              0.92    0.1500    0.0000
                          </tableData>
                      </table>
                </product>
            </function>
        </axis>

        <axis name="YAW">
            <documentation>
               - 0.1200 (beta-rad) replaced by CR D-2144.
            </documentation>
            <function name="aero/coefficient/Cnb">
                <description>Yaw_moment_due_to_beta</description>
                <product>
                    <property>aero/qbar-psf</property>
                    <property>metrics/Sw-sqft</property>
                    <property>metrics/bw-ft</property>
                    <property>aero/beta-rad</property>
                      <table>
                          <independentVar lookup="row">velocities/mach</independentVar>
                          <independentVar lookup="column">fcs/aeromatic</independentVar>
                          <independentVar lookup="table">atmosphere/density-altitude</independentVar>
                          <tableData breakPoint="0">
                                      0         1
                              0.20    0.1840    0.1200
                              0.25    0.1500    0.1200
                              0.30    0.1350    0.1200
                              0.45    0.1400    0.1200
                              0.65    0.1350    0.1200
                              0.75    0.1300    0.1200
                          </tableData>
                          <tableData breakPoint="20000">
                                      0         1
                              0.40    0.1300    0.1200
                              0.50    0.1450    0.1200
                              0.65    0.1700    0.1200
                              0.80    0.1750    0.1200
                              0.85    0.1850    0.1200
                              0.95    0.1500    0.1200
                          </tableData>
                          <tableData breakPoint="40000">
                                      0         1
                              0.70    0.1650    0.1200
                              0.80    0.1900    0.1200
                              0.90    0.2050    0.1200
                              0.95    0.1900    0.1200
                          </tableData>
                      </table>
                </product>
            </function>

            <documentation>
               - added from CR D-2144.
            </documentation>
            <function name="aero/coefficient/Cnp">
                <description>Yaw_moment_due_to_roll_rate</description>
                <product>
                    <property>aero/qbar-psf</property>
                    <property>metrics/Sw-sqft</property>
                    <property>metrics/bw-ft</property>
                    <property>aero/bi2vel</property>
                    <property>velocities/p-aero-rad_sec</property>
                      <table>
                          <independentVar lookup="row">velocities/mach</independentVar>
                          <independentVar lookup="column">fcs/aeromatic</independentVar>
                          <independentVar lookup="table">atmosphere/density-altitude</independentVar>
                          <tableData breakPoint="0">
                                      0         1
                              0.20   -0.2220    0.0000
                              0.25   -0.1210    0.0000
                              0.30   -0.0700    0.0000
                              0.45   -0.0320    0.0000
                              0.65    0.0050    0.0000
                              0.70    0.0180    0.0000
                          </tableData>
                          <tableData breakPoint="20000">
                                      0         1
                              0.40    0.0320    0.0000
                              0.50   -0.0700    0.0000
                              0.65   -0.0260    0.0000
                              0.80    0.0025    0.0000
                              0.90    0.0120    0.0000
                          </tableData>
                          <tableData breakPoint="40000">
                                      0         1
                              0.70   -0.0580    0.0000
                              0.80   -0.0060    0.0000
                              0.90    0.0200    0.0000
                          </tableData>
                      </table>
                </product>
            </function>

            <documentation>
               - -0.1500 (r-aero-rad_sec) replaced by CR D-2144.
            </documentation>
            <function name="aero/coefficient/Cnr">
                <description>Yaw_moment_due_to_yaw_rate</description>
                <product>
                    <property>aero/qbar-psf</property>
                    <property>metrics/Sw-sqft</property>
                    <property>metrics/bw-ft</property>
                    <property>aero/bi2vel</property>
                    <property>velocities/r-aero-rad_sec</property>
                      <table>
                          <independentVar lookup="row">velocities/mach</independentVar>
                          <independentVar lookup="column">fcs/aeromatic</independentVar>
                          <independentVar lookup="table">atmosphere/density-altitude</independentVar>
                          <tableData breakPoint="0">
                                      0         1
                              0.20   -0.3600   -0.1500
                              0.25   -0.3000   -0.1500
                              0.30   -0.2700   -0.1500
                              0.45   -0.2550   -0.1500
                              0.65   -0.2450   -0.1500
                              0.70   -0.2300   -0.1500
                          </tableData>
                          <tableData breakPoint="20000">
                                      0         1
                              0.40   -0.3000   -0.1500
                              0.50   -0.2800   -0.1500
                              0.65   -0.2800   -0.1500
                              0.80   -0.2650   -0.1500
                              0.90   -0.2300   -0.1500
                          </tableData>
                          <tableData breakPoint="40000">
                                      0         1
                              0.70   -0.3200   -0.1500
                              0.80   -0.3300   -0.1500
                              0.90   -0.3400   -0.1500
                              0.95   -0.3250   -0.1500
                          </tableData>
                      </table>
                </product>
            </function>

            <documentation>
               - -0.1000 (rudder-pos-rad) replaced by CR D-2144.
            </documentation>
            <function name="aero/coefficient/Cndr">
                <description>Yaw_moment_due_to_rudder</description>
                <product>
                    <property>aero/qbar-psf</property>
                    <property>metrics/Sw-sqft</property>
                    <property>metrics/bw-ft</property>
                    <property>fcs/rudder-pos-rad</property>
                      <table>
                          <independentVar lookup="row">velocities/mach</independentVar>
                          <independentVar lookup="column">fcs/aeromatic</independentVar>
                          <independentVar lookup="table">atmosphere/density-altitude</independentVar>
                          <tableData breakPoint="0">
                                      0         1
                              0.20   -0.1120   -0.1000
                              0.25   -0.1090   -0.1000
                              0.30   -0.1050   -0.1000
                              0.45   -0.0950   -0.1000
                              0.65   -0.0700   -0.1000
                              0.75   -0.0650   -0.1000
                          </tableData>
                          <tableData breakPoint="20000">
                                      0         1
                              0.40   -0.1000   -0.1000
                              0.50   -0.1100   -0.1000
                              0.65   -0.1000   -0.1000
                              0.80   -0.1000   -0.1000
                              0.85   -0.0900   -0.1000
                          </tableData>
                          <tableData breakPoint="40000">
                                      0         1
                              0.70   -0.1150   -0.1000
                              0.80   -0.1250   -0.1000
                              0.90   -0.0950   -0.1000
                              0.95   -0.0600   -0.1000
                          </tableData>
                      </table>
                </product>
            </function>

            <documentation>
               - 0.0000 (left-aileron-pos-rad) replaced by CR D-2144.
            </documentation>
            <function name="aero/coefficient/Cnda">
                <description>Adverse_yaw</description>
                <product>
                    <property>aero/qbar-psf</property>
                    <property>metrics/Sw-sqft</property>
                    <property>metrics/bw-ft</property>
                    <property>fcs/differential-inboard-aileron-rad</property>
                      <table>
                          <independentVar lookup="row">velocities/mach</independentVar>
                          <independentVar lookup="column">fcs/aeromatic</independentVar>
                          <independentVar lookup="table">atmosphere/density-altitude</independentVar>
                          <tableData breakPoint="0">
                                      0         1
                              0.20    0.0083    0.0000
                              0.25    0.0064    0.0000
                              0.30    0.0010    0.0000
                              0.45    0.0030    0.0000
                              0.65    0.0020    0.0000
                          </tableData>
                          <tableData breakPoint="20000">
                                      0         1
                              0.35    0.0000    0.0000
                              0.50    0.0016    0.0000
                              0.65    0.0018    0.0000
                              0.80    0.0008    0.0000
                              0.85   -0.0010    0.0000
                          </tableData>
                          <tableData breakPoint="40000">
                                      0         1
                              0.70    0.0006    0.0000
                              0.80    0.0002    0.0000
                              0.90   -0.0026    0.0000
                              0.95   -0.0030    0.0000
                          </tableData>
                      </table>
                </product>
            </function>
        </axis>
    </aerodynamics>

   <external_reactions>
        <documentation>
            tractor applied at front gear struts.
        </documentation>

       <force name="tractor" frame="BODY">
         <location unit="IN">
           <x> 305.0 </x>
           <y> 0.0 </y>
           <z> -146.5 </z>
         </location>
         <direction>
           <x>1</x>
           <y>0</y>
           <z>0</z>
         </direction>
       </force>

        <documentation>
            wake applied at wing leading edge.
            direction avoids warning message.
        </documentation>

       <force name="ai-wake" frame="BODY">
         <location unit="IN">
           <x> 826.77 </x>
           <y> 0.0 </y>
           <z>-70.26 </z>
         </location>
         <direction>
           <x>1.0</x>
           <y>0.0</y>
           <z>0.0</z>
         </direction>
       </force>
       <moment name="ai-wake" frame="BODY">
         <direction>
           <x>1.0</x>
           <y>0.0</y>
           <z>0.0</z>
         </direction>
       </moment>
   </external_reactions>
</fdm_config>
